дБ(x) := 10*log(x)  # функция перевода [разы] в [дБ]
раз(x) := 10^(0.1*x)  # функция перевода [дБ] в [разы]
# Задание прямоеугольника
rect(x, a, b) := if(x ≥ a and x ≤ b, 1, 0)
# Центрирование результатов
shCen(s) :=
    N ← rows(s)
    M ← round(N/2)
    for k ∈ 0 .. N - 1
        out[k] ← if(k < M, s[k + M], s[k - M])
    return out
# Линейное контрастирование:
Cont_Image(Im, Ymin, Ymax) :=
    minIm ← min(Im)
    maxIm ← max(Im)
    denom ← (maxIm - minIm)
    denom ← if(denom == 0, 1, denom)
    for i ∈ 0 .. rows(Im) - 1
        for j ∈ 0 .. cols(Im) - 1
            Out_Im[i, j] ← (Im[i, j] - minIm)/denom*(Ymax - Ymin) + Ymin
    return Out_Im
# Сдвиг на tau:
shift1(u, tau) :=
    u2 ← u
    if cols(u) - 1 > 0
        MaxT ← cols(u) - 1
        for x1 ∈ 0 .. rows(u) - 1
            for t ∈ 0 .. MaxT
                u[x1, t] ← if(t + tau ≥ 0 and t + tau ≤ MaxT, u2[x1, t + tau], 0)
        return u
    MaxT ← rows(u) - 1
    for t ∈ 0 .. MaxT
        u[t] ← if(t + tau ≥ 0 and t + tau ≤ MaxT, u2[t + tau], 0)
    return u
# Нормировка изображений иил процессво для вывода на графике
# Расчет средних значений по строкам
N_U(u) :=
    M ← cols(u) - 1
    N ← rows(u) - 1
    if M == 0
        MaxU ← max(u)
        return if(MaxU ≠ 0, u/|MaxU|, u)
    MaxU ← max(u)
    return if(MaxU ≠ 0, u/|MaxU|, u)
MeanRows(S, P) :=
    M ← rows(S)
    N ← cols(S)
    out ← 0
    for j ∈ 0 .. M - 1
        temp ← 0
        for i ∈ 0 .. N - 1
            temp[i] ← if(Re(S[j, i]) == 0, π/2, arg(S[j, i])) if P == 0
            temp[i] ← Re(S[j, i]) otherwise
        out[j] ← mean(temp)
    return out
shift(u, tau) :=
    N ← cols(u) - 1
    M ← rows(u) - 1
    if M ≠ 0
        for i ∈ 0 .. M
            for j ∈ 0 .. N
                u2[j] ← u[i, j]
            u2 ← shift1(u2, tau)
            for j ∈ 0 .. N
                out[i, j] ← u2[j]
        return out
    return shift1(u, tau)
# Плотность вероятности | Корреляция
PlontVer(Data, N) :=
    p ← 0
    maxR ← max(Data)
    minR ← min(Data)
    Delta ← (maxR - minR)/N
    X0 ← minR
    while X0 ≤ maxR
        k ← 0
        for j ∈ 0 .. rows(Data) - 1
            k ← if(Data[j] ≤ X0 + Delta and Data[j] > X0, k + 1, k)
        X0 ← X0 + Delta
        p ← p + 1
        out[p] ← k
    return if(p == 0, 0, out)
correl(S1, S2) :=
    j ← 0
    Ns1 ← rows(S1)
    Ns2 ← rows(S2)
    Ns1 ← if(Ns1 > Ns2, Ns2, Ns1)
    for i ∈ 0 .. Ns1 - 1 - j
        S1_S2 ← 0
        for k ∈ 0 .. Ns1 - 1 - j
            S1_S2 ← S1_S2 + S1[k]*S2[k + i]
        out[j] ← S1_S2/(Ns1 - j)
        j ← j + 1
    maxOut ← max(out)
    out ← out/maxOut
    return out
# Функция для моделирования движения судов
TargSDC(Im1, MASC, SDC, tau) :=
    N ← cols(Im1) - 1
    M ← rows(Im1) - 1
    SDC ← shift(SDC, tau)
    for j ∈ 0 .. M
        for i ∈ 0 .. N
            Nepod[j, i] ← if(MASC[j, i] == 0, 0, Im1[j, i])
    for j ∈ 0 .. M
        for i ∈ 0 .. N
            out[j, i] ← if(SDC[j, i] ≠ 0, SDC[j, i], Nepod[j, i])
    return out
# Медианная фильтрация
medflt(M, k) :=
    I0 ← (k - 1)/2
    J0 ← (k - 1)/2
    I1 ← rows(M) - (k + 1)/2
    J1 ← cols(M) - (k + 1)/2
    for i ∈ I0 .. I1
        for j ∈ J0 .. J1
            for r ∈ 0 .. k - 1
                for s ∈ 0 .. k - 1
                    A[r, s] ← M[i + r - (k - 1)/2, j + s - (k - 1)/2]
            N[i, j] ← median(A)
    N
# Обнаружение с использованием бернули
ck(l, n) :=
    uh ← 1
    return uh/l! if l == 0
    for i ∈ n - l + 1 .. n
        uh ← uh*i
    return uh/l!
Bernuly(u, n, Por, Umax) :=
    N ← rows(u)
    BernCont ← 0
    p ← 1 - Por/Umax
    q ← 1 - p
    for k ∈ 0 .. n
        BernCont[k] ← n!/(k!*(n - k)!)*p^k*q^(n - k)
    Count ← 0
    for t ∈ 0 .. N - 1
        out[t] ← 1
        Count ← if(u[t] < Por, 0, Count + 1)
        out[t] ← BernCont[Count]/1
        Count ← if(Count == n, Count - 1, Count)
    return out
# Обнаружение протяженных участков и приравнивание им 1
OBN(F, Coor, LOP) :=
    N ← rows(Coor)
    return F if N == 0
    M ← rows(F)
    for j ∈ 0 .. N - 1
        for i ∈ 0 .. M - 1
            F[i] ← rect(i, Coor[j], Coor[j] + LOP) if F[i] == 0
    return F
# Аргумент минимального значения процесса | Выделение контура по бинарной иноцрмации
ArgMin(M) :=
    k ← 2
    c ← [0; 0]
    MM ← |max(M)|
    M ← M/MM
    for j ∈ 0 .. rows(M) - 1
        if M[j] < k and M[j] ≠ 0
            c ← [j; M[j]*MM]
            k ← M[j]
    k ← 0
    for j ∈ 0 .. rows(M) - 1
        if (M[j] == c[1]/MM and c[1] ≠ 0)
            T[k] ← j
            k ← k + 1
    return [transpose(c); T]
CONTUR(Img, LOP) :=
    M ← rows(Img)
    N ← cols(Img)
    for i ∈ 0 .. M - 1
        ST ← 0
        for j ∈ 0 .. N - 1
            ST[j] ← Img[i, j]
            FI[j] ← 0
        L0 ← ArgMin(ST)[0][0, 0] if ArgMin(ST)[1][0, 0] ≠ 0
        for j ∈ 0 .. N - 1
            FI[j] ← rect(j, L0, L0 + LOP)
        FI ← OBN(FI, ArgMin(ST)[1], LOP) if ArgMin(ST)[1][0, 0] ≠ 0
        for j ∈ 0 .. N - 1
            AR[i, j] ← FI[j]
    for i ∈ 1 .. M - 2
        for j ∈ 0 .. N - 1
            OUT[i, j] ← 1 if (AR[i, j] == 0 and AR[i + 1, j] > 0 and AR[i - 1, j] == 0) or (AR[i, j] > 0 and AR[i + 1, j] == 0 and AR[i - 1, j] ≥ 0)
    return AR
CONTUR_AZ(Img, LOP) :=
    M ← rows(Img)
    N ← cols(Img)
    for j ∈ 0 .. N - 1
        ST ← 0
        for i ∈ 0 .. M - 1
            ST[i] ← Img[i, j] + 1
            FI[i] ← 0
        L0 ← ArgMin(ST)[0][0, 0] if ArgMin(ST)[1][0, 0] ≠ 0
        for i ∈ 0 .. M - 1
            FI[i] ← rect(i, L0, L0 + LOP)
        FI ← OBN(FI, ArgMin(ST)[1], LOP) if ArgMin(ST)[1][0, 0] ≠ 0
        for i ∈ 0 .. M - 1
            AR[i, j] ← FI[i]
    for j ∈ 1 .. N - 2
        for i ∈ 0 .. M - 1
            OUT[i, j] ← 1 if (AR[i, j] == 0 and AR[i, j + 1] > 0 and AR[i, j - 1] == 0) or (AR[i, j] > 0 and AR[i, j + 1] == 0 and AR[i, j - 1] ≥ 0)
    return AR
# Оконтуривание по алгоритму квадрата градиетна
ImgBernul(Img, LOP, Porg, Umax) :=
    M ← rows(Img) - 1
    N ← cols(Img) - 1
    for i ∈ 0 .. M
        L0 ← 0
        u ← 0
        for t ∈ 0 .. N
            u[t] ← Img[i, t]
        Bern ← Bernuly(u, LOP, Porg, Umax)
        L0 ← ArgMin(Bern)[0][0, 0] if ArgMin(Bern)[1][0, 0] ≠ 0
        for t ∈ 0 .. N
            FI[t] ← rect(t, L0 - 1 - LOP, L0 - 1)
        FI ← OBN(FI, ArgMin(Bern)[1], LOP) if ArgMin(Bern)[1][0, 0] ≠ 0
        for t ∈ 0 .. N
            AR[i, t] ← FI[t]
    return AR
DImg(u, n) :=
    N ← cols(u) - n
    M ← rows(u) - n
    if M ≠ 0
        for j ∈ 0 .. M
            for i ∈ 0 .. N
                u2 ← 0
                for k ∈ 1 .. n - 1
                    u2 ← u2 + 1*((u[j + k, i + k] - u[j, i])^2 + (u[j + k, i] - u[j, i + k])^2)
                out[j, i] ← u2/(2*if((n - 1) ≠ 0, n - 1, 1))
        return out
    return 0
# Стравнение с порогом
# Вероятность правильного обнаружения | Вероятность ложной тревоги
PorD(Img, Por) :=
    M ← rows(Img) - 1
    N ← cols(Img) - 1
    for j ∈ 0 .. M
        for i ∈ 0 .. N
            out[j, i] ← if(Img[j, i] ≥ Por, 1, 0)
    return out
Wpr(IM1, IT) :=
    N ← cols(IM1) - 1
    M ← rows(IM1) - 1
    C ← 0
    T ← 0
    for j ∈ 0 .. M
        for i ∈ 0 .. N
            C ← if(IT[j, i] > 0, C + 1, C)
    for j ∈ 0 .. M
        for i ∈ 0 .. N
            T ← if(IM1[j, i] > 0 and IT[j, i] > 0, T + 1, T)
    return T/C
Wlt(IM1, IT) :=
    N ← cols(IM1) - 1
    M ← rows(IM1) - 1
    C ← 0
    T ← 0
    for j ∈ 0 .. M
        for i ∈ 0 .. N
            C ← if(IT[j, i] == 0, C + 1, C)
    for j ∈ 0 .. M
        for i ∈ 0 .. N
            T ← if(IT[j, i] == 0 and IM1[j, i] > 0, T + 1, T)
    return T/C
# Вероятность пропуска объектов | Вероятность правильного необнаружения объектов
Wlp(IM1, IT) :=
    N ← cols(IM1) - 1
    M ← rows(IM1) - 1
    C ← 0
    T ← 0
    for j ∈ 0 .. M
        for i ∈ 0 .. N
            C ← if(IT[j, i] > 0, C + 1, C)
    for j ∈ 0 .. M
        for i ∈ 0 .. N
            T ← if(IT[j, i] > 0 and IM1[j, i] == 0, T + 1, T)
    return T/C
Wtp(IM1, IT) :=
    N ← cols(IM1) - 1
    M ← rows(IM1) - 1
    C ← 0
    T ← 0
    for j ∈ 0 .. M
        for i ∈ 0 .. N
            C ← if(IT[j, i] == 0, C + 1, C)
    for j ∈ 0 .. M
        for i ∈ 0 .. N
            T ← if(IM1[j, i] == 0, T + 1, T)
    return T/C
# Оптмальный алгоритм с декорреляцией
# Декоррелированная автокорреляционная функция:
YDF(u, Sigma0, sd, SN, MaxT, x1) :=
    N ← MaxT - 1
    Ru ← 0
    for t1 ∈ 0 .. N
        for t2 ∈ 0 .. N
            Sum ← 0
            for tau ∈ 0 .. N
                Sum ← if(sd[t1, tau] ≠ 0 or sd[t2, tau] ≠ 0, Sigma0[x1, tau]*sd[t1, tau]*sd[t2, tau] + Sum, Sum)
            Ru[t1, t2] ← Sum
    for t ∈ 0 .. N
        Ru[t, t] ← Ru[t, t] + SN
    Wu ← 0
    Wu ← Ru^-1
    return Wu
    Sw ← 0
    for t ∈ 0 .. N
        for t1 ∈ 0 .. N
            Sum ← 0
            for t2 ∈ 0 .. N
                Sum ← if(sd[t2, t] ≠ 0, Wu[t1, t2]*sd[t2, t] + Sum, Sum)
            Sw[t1, t] ← Sum
    return Sw
    Yout ← 0
    for t ∈ 0 .. N
        Sum ← 0
        for t1 ∈ 0 .. N
            Sum ← Sum + u[x1, t1]*Sw[t1, t]
        Yout[t] ← Sum
    return Yout
KSiW(Sigma0, sd, SN, MaxT, TauP, x1) :=
    N ← MaxT - 1
    Ru ← 0
    for t1 ∈ 0 .. N
        for t2 ∈ 0 .. N
            Sum ← 0
            for tau ∈ 0 .. N
                Sum ← if(sd[t1, tau] ≠ 0 or sd[t2, tau] ≠ 0, Sigma0[x1, tau]*sd[t1, tau]*sd[t2, tau] + Sum, Sum)
            Ru[t1, t2] ← Sum
    for t ∈ 0 .. N
        Ru[t, t] ← Ru[t, t] + SN
    Wu ← 0
    Wu ← Ru^-1
    for tau ∈ 0 .. 2*TauP
        Sum ← 0
        for t1 ∈ 0 .. N
            for t2 ∈ 0 .. N
                Sum ← if(sd[t1, tau] ≠ 0, sd[t1, tau]*Wu[t1, t2]*sd[t2, 0] + Sum, Sum)
        KSW[tau] ← Sum
    maxKSW ← max(KSW)
    maxKSW ← if(maxKSW == 0, 1, maxKSW)
    KsiW ← KSW/maxKSW
    return KsiW
# Процедуры по  ВЕЙВЛЕТУ
# Обнуления коэффициентов | Пороговая обработка, жесткий и мягкий трешолдинг | Фильтр обработки вейвлета | Процедура обработки всего изображения по строкам
WVNull(WD, L) :=
    for j ∈ 2^L .. 2^(L + 1) - 1
        WD[j] ← 0
    return WD
WVPorog(WD, Pg, Type) :=
    N ← rows(WD) - 1
    for j ∈ 0 .. N
        WD[j] ← if(|WD[j]| ≥ Pg, WD[j] - Pg, 0) if Type == 0
        WD[j] ← if(|WD[j]| ≥ Pg, Pg*sign(WD[j]), WD[j]) otherwise
    return WD
WVfilter(WD, L, Pg, Type) :=
    N ← rows(WD) - 1
    if Type == 0
        WD ← WVNull(WD, L)
        WD ← WVNull(WD, L + 1)
    WD ← WVPorog(WD, Pg, Type)
    return WD
WVTransIMG(NSR, Pg, L, Type) :=
    M ← rows(NSR) - 1
    N ← cols(NSR) - 1
    for j ∈ 0 .. M
        SW ← transpose(NSR)[:, j]
        WS ← wave(SW)
        WPR ← WVfilter(WS, L, Pg, Type)
        PRW ← iwave(WPR)
        for i ∈ 0 .. N
            OUT[j, i] ← PRW[i]
    return OUT
# Усиление выбранных коэффициентов
# может быть использовано для выделение границ
WVAmplPg(WD, L, Pg, Ampl) :=
    for j ∈ 2^L .. 2^(L + 1) - 1
        WD[j] ← if(|WD[j]| ≥ Pg, Ampl*WD[j], WD[j])
    return WD
# Выборка коэффициентов Вейвлета | Суммирование  коєффициентов Вейвлета | По заданному значению находим индекс в массиеве Вейвлета
WVCoeff(WD) :=
    NL ← length(WD)
    NLevel ← ln(NL)/ln(2) - 1
    for k ∈ 1 .. NLevel
        SBM ← submatrix(WD, 2^k, 2^(k + 1) - 1, 0, 0)
        for j ∈ 0 .. NL - 1
            RES[j, k] ← SBM[floor(j/(NL/2^k))]
    return RES
WVCoeffSum(C, W0, From, To) :=
    N ← rows(C) - 1
    M ← cols(C) - 1
    for i ∈ 0 .. N
        Sum ← 0
        for j ∈ From .. To
            Sum ← Sum + C[i, j]
        OUT[i] ← Sum + W0
    return OUT
# Уменьшение определенных коэффициентов на M
WVIndexV(x, L, NL) :=
    v ← 2^L + floor(x/(NL/2^L))
    return "error" if v > NL or v > 2^(L + 1)
    return v
WVAddPg(WD, L, Pg, Ampl) :=
    for j ∈ 2^L .. 2^(L + 1) - 1
        WD[j] ← if(|WD[j]| ≥ Pg, WD[j] - Ampl, WD[j])
    return WD
# Расчет энергии коэффициентов разложения | Обработка по  локальная скейлограмма
WVPower(WD) :=
    NL ← length(WD)
    NLevel ← ln(NL)/ln(2) - 1
    for k ∈ 0 .. NLevel
        SUM ← 0
        CKO ← 0
        for j ∈ 2^k .. 2^(k + 1) - 1
            SUM ← SUM + WD[j]
            CKO ← CKO + WD[j]^2
        RES[0, k] ← SUM/(2^(k + 1) - 2^k)
        RES[1, k] ← CKO/(2^(k + 1) - 2^k)
    return RES
# Преобразование вейлета по коэффициентам
WVScaleGram(WD) :=
    NL ← length(WD)
    NLevel ← ln(NL)/ln(2) - 1
    C ← WVCoeff(WD)
    for k ∈ 1 .. NLevel
        for v ∈ 0 .. NL - 1
            C2[v, k] ← C[v, k]^2
    for v ∈ 0 .. NL - 1
        continue if |C[v, 4]| ≥ 150
        g ← 1
        for k ∈ 1 .. NLevel
            x ← WVIndexV(v, k, NL)
            C2[v, k] ← 1*C2[v, k]
            WD[x] ← 0*WD[x]
    return WD
WVCoeffFilter(WD, C, From, To, L) :=
    N ← rows(C) - 1
    M ← cols(C) - 1
    NL ← rows(WD) - 1
    pv ← 0
    for i ∈ From .. To
        Sum ← 0
        for k ∈ L
            v ← WVIndexV(i, k, NL)
            continue if pv == v
            pv ← v
            WD[v] ← 0
    return WD
# Обнаружение протяженных участков в соответствии с алгоритмом V1-39-12
# S - Сигнал, P0 - порог для единичного сигнала, PTP - порог для мат ожидания L - уровень шума от L1 до L2
# TPLength - ограничение на протяженность объектаб если 0 - значит снимаем это ораничение
WVDetectMy(S, P0, PTP, L1, L2, TPLength) :=
    NL ← length(S)
    NLevel ← floor(ln(NL)/ln(2)) - 1
    if NL < 2^(NLevel + 2)
        for i ∈ NL - 1 .. 2^(NLevel + 2) - 1
            S[i] ← 0
        NLevel ← NLevel + 1
    WD ← wave(S)
    L2 ← if(L2 > NLevel, NLevel, L2)
    L1 ← 0 if L1 < 0
    L1 ← 2^L1 otherwise
    for j ∈ L1 .. 2^(NLevel - L2) - 1
        WD[j] ← 0
    SynNoise ← iwave(WD)
    NS ← length(SynNoise) - 1
    WD ← 0
    i ← 0
    while i ≤ NS
        SMean[i] ← 0
        SCKO[i] ← 0
        STp[i] ← 0
        if S[i] > P0
            k ← 0
            TPBig ← 1
            TmpDN ← 0
            TmpSN ← 0
            TmpPorG ← 0
            while (i + k) ≤ NS and S[i + k] > P0
                TmpDN[k] ← S[i + k] - SynNoise[i + k]
                TmpSN[k] ← S[i + k]
                k ← k + 1
            TPBig ← 0 if TPLength ≠ 0 and k > TPLength
            TmpSMean ← mean(TmpDN)
            TmpSCKO ← sqrt(var(TmpDN))
            for j ∈ i .. i + k - 1
                SMean[j] ← TmpSMean
                SCKO[j] ← TmpSCKO
                STp[j] ← S[j]*TPBig if |SMean[j]|/if(SCKO[j] == 0, 1, SCKO[j]) > 1 and |SMean[j]| ≥ PTP
                STp[j] ← 0 otherwise
            i ← i + k
        i ← i + 1 otherwise
    return [STp; SynNoise; SMean; SCKO]
WVDetectMy2(S, P0, PTP, L1, L2, TPLength) :=
    NL ← length(S)
    NLevel ← floor(ln(NL)/ln(2)) - 1
    if NL < 2^(NLevel + 2)
        for i ∈ NL - 1 .. 2^(NLevel + 2) - 1
            S[i] ← 0
        NLevel ← NLevel + 1
    WD ← wave(S)
    L2 ← if(L2 > NLevel, NLevel, L2)
    L1 ← 0 if L1 < 0
    L1 ← 2^L1 otherwise
    for j ∈ L1 .. 2^(NLevel - L2) - 1
        WD[j] ← 0
    SynNoise ← iwave(WD)
    NS ← length(SynNoise) - 1
    WD ← 0
    i ← 0
    while i ≤ NS
        SMean[i] ← 0
        SCKO[i] ← 0
        STp[i] ← 0
        if S[i] > P0
            k ← 0
            TPBig ← 1
            TmpDN ← 0
            TmpSN ← 0
            TmpPorG ← 0
            while (i + k) ≤ NS and TmpPorG < 1
                TmpDN[k] ← S[i + k] - SynNoise[i + k]
                TmpSN[k] ← S[i + k]
                TmpPorG ← if(var(TmpDN) ≠ 0, sqrt(var(TmpSN))/sqrt(var(TmpDN)), 0)
                k ← k + 1
            TPBig ← 0 if TPLength ≠ 0 and k > TPLength
            TmpSMean ← mean(TmpDN)
            TmpSCKO ← sqrt(var(TmpDN))
            for j ∈ i .. i + k - 1
                SMean[j] ← TmpSMean
                SCKO[j] ← TmpSCKO
                STp[j] ← S[j]*TPBig if |SMean[j]|/if(SCKO[j] == 0, 1, SCKO[j]) > 1 and |SMean[j]| ≥ PTP
                STp[j] ← 0 otherwise
            i ← i + k
        i ← i + 1 otherwise
    return [STp; SynNoise; SMean; SCKO]
WVDetectMy3(S, P0, PTP, L1, L2, TPLength) :=
    NL ← length(S)
    NLevel ← floor(ln(NL)/ln(2)) - 1
    if NL < 2^(NLevel + 2)
        for i ∈ NL - 1 .. 2^(NLevel + 2) - 1
            S[i] ← 0
        NLevel ← NLevel + 1
    WD ← wave(S)
    L2 ← if(L2 > NLevel, NLevel, L2)
    L1 ← 0 if L1 < 0
    L1 ← 2^L1 otherwise
    for j ∈ L1 .. 2^(NLevel - L2) - 1
        WD[j] ← 0
    SynNoise ← iwave(WD)
    NS ← length(SynNoise) - 1
    SiMean ← mean(SynNoise)
    SiVar ← sqrt(var(SynNoise))*1
    SiVar ← 1 if SiVar == 0
    WD ← 0
    i ← 0
    while i ≤ NS
        SMean[i] ← 0
        SCKO[i] ← 0
        STp[i] ← 0
        if S[i] > P0
            k ← 0
            TPBig ← 1
            TmpDN ← 0
            TmpSN ← 0
            TmpPorG ← 0
            while (i + k) ≤ NS and TmpPorG < 1
                TmpDN[k] ← S[i + k] - SynNoise[i + k]
                TmpSN[k] ← S[i + k]
                TmpPorG ← if(var(TmpDN) ≠ 0, sqrt(var(TmpSN))/SiVar, 0)
                k ← k + 1
            TPBig ← 0 if TPLength ≠ -1 and k ≤ TPLength
            TmpSMean ← mean(TmpDN)
            TmpSCKO ← sqrt(var(TmpDN))
            for j ∈ i .. i + k - 1
                SMean[j] ← TmpSMean
                SCKO[j] ← TmpSCKO
                STp[j] ← S[j]*TPBig if |SMean[j]|/if(SCKO[j] == 0, 1, SCKO[j]) > 1 and |SMean[j]| ≥ PTP
                STp[j] ← 0 otherwise
            i ← i + k
        i ← i + 1 otherwise
    return [STp; SynNoise; SMean; SCKO; SiMean; SiVar]
# Изображение полностью
WVDetectImg(Img, P0, P, L1, L2, TPLength, K, Type) :=
    M ← rows(Img) - 1
    N ← cols(Img) - 1
    for j ∈ 0 .. M
        for i ∈ 0 .. N
            Tmp[i] ← Img[j, i]
        Tmp2 ← WVDetectMy(Tmp, P0, P, L1, L2, TPLength)[K] if Type == 0
        Tmp2 ← WVDetectMy2(Tmp, P0, P, L1, L2, TPLength)[K] if Type == 1
        Tmp2 ← WVDetectMy3(Tmp, P0, P, L1, L2, TPLength)[K] if Type == 2
        for i ∈ 0 .. N
            Out[j, i] ← Tmp2 if K ≥ 4
            Out[j, i] ← Tmp2[i] otherwise
    return Out
